units           metal
atom_style      atomic
atom_modify     map array
boundary        p p p
atom_modify        sort 0 0.0
# temperature
variable myTemp equal ${T}
# diamond unit cell
variable myL equal ${size}
variable myscale equal 1.#1.3
variable a equal 5.431*${myscale}
lattice         custom $a               &
a1 1.0 0.0 0.0          &
a2 0.0 1.0 0.0          &
a3 0.0 0.0 1.0          &
basis 0.0 0.0 0.0       &
basis 0.0 0.5 0.5       &
basis 0.5 0.0 0.5       &
basis 0.5 0.5 0.0       &
basis 0.25 0.25 0.25    &
basis 0.25 0.75 0.75    &
basis 0.75 0.25 0.75    &
basis 0.75 0.75 0.25
region          myreg block     0 ${myL} 0 ${myL}  0 ${myL}
create_box      1 myreg
create_atoms    1 region myreg
mass            1       28.06
group Si type 1
velocity all create ${myTemp} 5287286 mom yes rot yes dist gaussian
pair_style      sw
pair_coeff * * Si.sw Si
neighbor        1.0 bin
neigh_modify    every 1 delay 10 check yes
timestep        ${dt}

#compute t all temp
fix 1 all nvt temp ${myTemp} ${myTemp} 1

# Run simulation
thermo          ${Dump}
thermo_style custom step density temp
variable b equal temp

#dump 1 all custom ${Dump} dump2.lammpstrj id type x y z vx vy vz
run ${Run}
label loopa
variable loopi loop ${Nruns}
    if "(${b} < ${myTemp})" then "print ${b}"&
        "write_restart ${dumpname}"&
        "jump ${filename} break"&
    else &
        "print c_t" &
        "run ${Run}" &
        "next loopi" &
        "jump ${filename} loopa"
label break
variable    loopi delete
